*Heading
** Job name: Job-1 Model name: Model-1
** Generated by: Abaqus/CAE 6.14-2
*Preprint, echo=NO, model=NO, history=NO, contact=NO
**
** PARTS
**
*Part, name=Part-1
*End Part
**
**
** ASSEMBLY
**
*Assembly, name=Assembly
**
*Instance, name=Part-1-1, part=Part-1
*Node
      1,           0.,           0.
      2,          20.,           0.
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*Element, type=CPS3
  1,   1,   2,  23
  2,  23,  22,   1
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*Nset, nset=_PickedSet2, internal, generate
   1,  231,    1
*Elset, elset=_PickedSet2, internal, generate
   1,  400,    1
** Section: Section-1
*Solid Section, elset=_PickedSet2, material=steel
1.1,
*End Instance
**
*Nset, nset=_PickedSet7, internal, instance=Part-1-1, generate
   1,  211,   21
*Elset, elset=_PickedSet7, internal, instance=Part-1-1, generate
   2,  362,   40
*End Assembly
**
** MATERIALS
**
*Material, name=steel
*Density
 7.8e-09,
*Elastic
210000., 0.3
** ----------------------------------------------------------------
**
** STEP: Step-1
**
*Step, name=Step-1, nlgeom=NO, perturbation
*Frequency, eigensolver=Lanczos, acoustic coupling=on, normalization=displacement
10, , , , ,
**
** BOUNDARY CONDITIONS
**
** Name: BC-1 Type: Symmetry/Antisymmetry/Encastre
*Boundary
_PickedSet7, ENCASTRE
**
** OUTPUT REQUESTS
**
*Restart, write, frequency=0
**
** FIELD OUTPUT: F-Output-1
**
*Output, field, variable=PRESELECT
*End Step
